sqrt(100) = 10
|-10| = 10
10! = 3628800
# Корень | Модуль | Факториал
a := 3.4
b := 6.22
c ≡ 0.149
N := e^sin(c)*cos(a/b) = 0.990999
Z := (2*a*b + nthroot(c, 3))/sqrt((a^2 + b^(a + c))*c) = 4.29283
π = 3.14159
Z1 := -3 + 2i
Z2 := 1 + 2i
Z3 := 3 + 4i
|Z1| = 3.60555
Re(Z1) = -3
Im(Z1) = 2
arg(Z1) = 2.55359
Z2 + Z3 = 4 + 6i
Z2 - Z3 = -2 - 2i
Z1*Z2 = -7 - 4i
Z1/Z3 = -0.04 + 0.72i
i := 1 .. 10
sum(i, i) = 55
product(i + 1, i) = 39916800
integral(x^2*log(x + 2), x = 0 .. 0.4) = 0.00771149
integral(cot(2*x)/sin(2*x)^2, x = 0.8 .. 1.2) = -0.297731
x := 2
d/dx(x^5) = 80
d/dx(sin(x)) = -0.416147
m := 4
a := -2.9
b := 3
h := 0.1
t := a, a + h .. b
y(t) := (1 + sin(b^3 + t^3)^2)/nthroot(b^3 + t^3, 3)
t = [
    -2.9; -2.8; -2.7; -2.6; -2.5; -2.4; -2.3; -2.2; -2.1; -2
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]
y(t) = [
    0.912183; 1.10266; 0.895404; 0.473429; 0.828296; 0.562187; 0.646752; 0.536018; 0.691223; 0.383174
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]
x1 := -5
y1 := 0
x2 := 0
y2 := 2
x3 := 6
y3 := 5
P := sqrt((x2 - x1)^2 + (y2 - y1)^2) + sqrt((x3 - x2)^2 + (y3 - y2)^2) + sqrt((x3 - x1)^2 + (y3 - y1)^2) = 24.1764
