a := 0
b := 1
s := 0.1
x := a, a + s .. b
f(x) := e^(x - 1) - x^3 - x
x = [0; 0.1; 0.2; 0.3; 0.4; 0.5; 0.6; 0.7; 0.8; 0.9; 1]
root(f(x), x, 0, 1) = 0.483464
f(x) = [0.367879; 0.30557; 0.241329; 0.169585; 0.0848116; -0.0184693; -0.14568; -0.302182; -0.493269; -0.724163; -1]
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g(t) ≡ t^4 - 2*t^3 + t^2 - 12*t + 20
v := g(t) coeffs → [20; -12; 1; -2; 1]
polyroots(v) = [-1 - 2i; -1 + 2i; 1.99946; 2.00054]
t^4 - 2*t^3 + t^2 - 12*t + 20 == 0 solve → [2; 2; -1 + 2i; -1 - 2i]
x1 := 0
x2 := 0
x3 := 0
x4 := 0
Given
6*x1 - x2 + 10*x3 - x4 == 158
2*x1 + x2 + 10*x3 + 7*x4 == 128
B := [158; 128; 7; 17]
A := [6, -1, 10, -1; 2, 1, 10, 7; 3, -2, -2, -1; 1, -12, 2, -1]
3*x1 - 2*x2 - 2*x3 - x4 == 7
x1 - 12*x2 + 2*x3 - x4 == 17
|A| = -3432
c := A^-1*B
c = [10; 1; 10; 1]
c := lsolve(A, B)
c = [10; 1; 10; 1]
Find(x1, x2, x3, x4) = [10; 1; 10; 1]
y(t) := cos(t + 0.5) - 0.8
x(t) := (sin(t) - 1.6)/2
a := -1
b := 1
s := 0.1
t := a, a + s .. b
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x := 0
y := 0
Given
cos(x + 0.5) + y == 0.8
sin(y) - 2*x == 1.6
Minerr(x, y) = [-0.866581; -0.133558]
