x1 := -2.34
x2 := 5.65
F(x1) :=
    if x1 ≤ 0
        y ← (-8*x1*sin(x1))/e^sqrt(|x1|)
        z ← 8/(-x1)
    if x1 > 0
        y ← 0.8*x1/|sin(x1)| + cos(x1 - π/3)
        z ← (2*x1)/(sqrt(x1^3) - 1)
F(x1) = 3.4188
F(x2) :=
    if x2 ≤ 0
        y ← (-8*x2*sin(x2))/e^sqrt(|x2|)
        z ← 8/(-x2)
    if x2 > 0
        y ← 0.8*x2/|sin(x2)| + cos(x2 - π/3)
        z ← (2*x2)/(sqrt(x2^3) - 1)
F(x2) = 0.909098
# Зад 2
t := 100
F(t) :=
    c ← 0
    for k ∈ 0 .. t
        if mod(k, 3) ≠ 0
            c ← (c + 1) if mod(k, 2) == 0
    c
F(t) = 34
