# Задание 1
π = 3.14159
t := 12.345667
π float, 7 → 3.141593
t float, 3 → 12.3
# Задание 2
sqrt((-7))
0 + sqrt(7)*1i
e^(1 + π*i/4)
e^(π*i/4 + 1)
e^(π*i/4 + 1)
e^(1 + π*i/4)
# Задание 3
x^4 - 2*x^3 + x^2 - 12*x + 20
(x^2 + 2*x + 5)*(x - 2)^2
x^4 - 2*x^3 + x^2 - 12*x + 20 substitute, x == y + z → (y + z - 2)^2*(y^2 + 2*y*z + 2*y + z^2 + 2*z + 5)
(y + z - 2)^2*(y^2 + 2*y*z + 2*y + z^2 + 2*z + 5)
y^4 + 4*y^3*z - 2*y^3 + 6*y^2*z^2 - 6*y^2*z + y^2 + 4*y*z^3 - 6*y*z^2 + 2*y*z - 12*y + z^4 - 2*z^3 + z^2 - 12*z + 20
y^4 + 4*y^3*z - 2*y^3 + 6*y^2*z^2 - 6*y^2*z + y^2 + 4*y*z^3 - 6*y*z^2 + 2*y*z - 12*y + z^4 - 2*z^3 + z^2 - 12*z + 20
z^4 + (4*y - 2)*z^3 + (6*y^2 - 6*y + 1)*z^2 + (4*y^3 - 6*y^2 + 2*y - 12)*z + y^4 - 2*y^3 + y^2 - 12*y + 20
# Задание 4
(6*x^2 - x + 1)/(x^3 - x) parfrac → 3/(x - 1) - 1/x + 4/(x + 1)
(3*x^2 - 2)/((x^2 + x + 1)*(x + 1)) parfrac → (2*x - 3)/(x^2 + x + 1) + 1/(x + 1)
(x + 1)/(x*(x - 1)^3) parfrac → 1/(x - 1) - 1/x - 1/(x - 1)^2 + 2/(x - 1)^3
(5*x^2 - 4*x + 16)/((x^2 - x + 1)^2*(x - 3)) parfrac → 1/(x - 3) - (x + 2)/(x^2 - x + 1) - (2*x + 3)/(x^2 - x + 1)^2
# Задание 5
x0 := 0
ln(1 + x) series → x - x^2/2 + x^3/3 - x^4/4 + x^5/5 - x^6/6
sin(x)^2 series → x^2 - x^4/3 + 2*x^6/45
# Задание 6
1/tan(2*x + 1)
ln(cos(4*x + 2) - 1 + sin(4*x + 2)*1i)/2 - x*1i
# Задание 7
1/tan(2*x + 1)
-(2*tan(2*x + 1)^2 + 2)/tan(2*x + 1)^2
2*(2*tan(2*x + 1)^2 + 2)^2/tan(2*x + 1)^3 - 4*(2*tan(2*x + 1)^2 + 2)/tan(2*x + 1)
# Задание 8
[1, a, b; x, 2, c; x^2, 3, d]
[1, x, x^2; a, 2, 3; b, c, d]
[1, y; x, 2]
[-2/(x*y - 2), y/(x*y - 2); x/(x*y - 2), -1/(x*y - 2)]
[1, a, b; x, 2, c; x^2, 3, d]
2*d - 3*c - 2*b*x^2 + 3*b*x - a*d*x + a*c*x^2
# Задание 9
limit((sqrt(1 + 2*x) - 3)/(sqrt(x) - 2), x → 4) → 4/3
limit((sqrt(1 - x) - 3)/(2 + nthroot(x, 3)), x → -8) → -2
limit((x^2 - 1)/ln(x), x → 1) → 2
limit((sqrt(x^2 - x + 1) - 1)/ln(x), x → 1) → 1/2
# Задание 10
sum(6/(9*n^2 + 12*n - 5), n = 1 .. ∞) → 7/10
sum(24/(9*n^2 - 12*n - 5), n = 2 .. ∞) → 5
# Задание 11
(4*x + 1)/(16*x^2 + 8*x + 3) + 1/sqrt(2)*atan((4*x + 1)/sqrt(2))
4/(16*x^2 + 8*x + 3) + 2/((4*x + 1)^2/2 + 1) - (4*x + 1)*(32*x + 8)/(16*x^2 + 8*x + 3)^2 simplify → 16/(16*x^2 + 8*x + 3)^2
2/(x - 1)*sqrt(2*x - x^2) + ln((1 + sqrt(2*x - x^2))/(x - 1))
-2*sqrt(2*x - x^2)/(x - 1)^2 - (x - 1)*((sqrt(2*x - x^2) + 1)/(x - 1)^2 + (2*x - 2)/(2*sqrt(2*x - x^2)*(x - 1)))/(sqrt(2*x - x^2) + 1) - (2*x - 2)/(sqrt(2*x - x^2)*(x - 1)) simplify → -(x + 1)/(sqrt(2*x - x^2)*(x - 1)^2)
# Задание 12
integral((3*x + 4)*e^(3*x), x) → e^(3*x)*(x + 1)
integral((4*x - 2)*cos(2*x), x) → cos(2*x) - sin(2*x) + 2*x*sin(2*x)
# Задание 13
integral((x^2 + 5*x + 6)*cos(2*x), x = -2 .. 0) → sin(2)^2/2 - sin(4)/4 + 1
integral((x^2 - 4)*cos(3*x), x = -2 .. 0) → 4*cos(6)/9 - 2*sin(6)/27
