# Worksheet setting: ORIGIN = 1
# Входные параметры
a := -5
b := 5
L := 5
K := 50
N := 100
c := 1
n := 2
ε := 0.001
α := 1
β := 0.5
# Входные параметры:
# n - количество переменных
# L - длина хромосомы
# K - количество особей в популяции
#
# Выходной параметр:
# k0 - номера точек на сетке
f(x) := 2*x[1]^2 + x[2]^2 + sin(x[1] + x[2])
# Выбор особей для начальной популяции
osobNumber(n, L, K) :=
    N ← 2^L - 1
    for j ∈ 1 .. n
        for i ∈ 1 .. K
            k0[j, i] ← round(rnd(N) + 1)
    k0
k0 := osobNumber(n, L, K)
k0 = [
    15, 19, 20, 17, 23, 7, 7, 15, 4, 4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;
    20, 3, 21, 4, 8, 30, 22, 16, 16, 17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]
# Шаг 1. Формирование начальной популяции
zeroPopulation(a, b, k0, L) :=
    n ← rows(k0)
    K ← cols(k0)
    N ← 2^L - 1
    for j ∈ 1 .. n
        for i ∈ 1 .. K
            v0[j, i] ← a + k0[j, i]*(b - a)/N
    v0
# Входные параметры:
# a,b - границы интервала
# k0 - номера генов  в популяции
# K - количество особей в популяции
#
# Выходной параметр:
# v0 - начальная популяция
v0 := zeroPopulation(a, b, k0, L) = [
    -0.16129, 1.12903, 1.45161, 0.483871, 2.41935, -2.74194, -2.74194, -0.16129, -3.70968, -3.70968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;
    1.45161, -4.03226, 1.77419, -3.70968, -2.41935, 4.67742, 2.09677, 0.16129, 0.16129, 0.483871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]
ff(v0) :=
    n ← cols(v0)
    for i ∈ 1 .. n
        ff[i] ← f(v0[:, i])
    ff
# Входные параметры:
# v0 - начальная популяция
# Выходной параметр:
# kn - номера генов  в популяции
mean(ff(v0)) = 21.7649
F := ff(v0) = [
    3.12013; 18.5724; 7.27801; 14.3141; 17.5598; 37.8489; 18.8316; 0.0780437; 27.9451; 27.8417
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]
# Шаг 2. Выбор родителей с помощью рулетки
ws1(w, K) :=
    for i ∈ 1 .. K
        p[i] ← (1 - w[i])/sum(1 - w[j], j = 1 .. K)
    p
# Входные параметры:
# x - популяция
# K - число особей в популяции
#
# Выходной параметр:
# p - массив вероятностей для выбора родителя
weights(x, K) :=
    sum ← sum(|x[i]|, i = 1 .. K)
    for s ∈ 1 .. K
        W[s] ← |x[s]|/sum
    W
w := weights(F, K)
ws2 := ws1(w, K)
ruletka(w) :=
    n ← rows(w)
    w1 ← sort(w)
    for j ∈ 1 .. n
        k[j] ← j
    for j ∈ 1 .. n
        r[j] ← rnd(1)
    for j ∈ 1 .. n
        for i ∈ 1 .. n
            if r[j] ≥ sum(w1[m], m = 1 .. i)
                k[j] ← i
                continue
    k
ws2 = [
    0.0203497; 0.0200599; 0.0202717; 0.0201397; 0.0200789; 0.0196984; 0.020055; 0.0204067; 0.0198841; 0.019886
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]
w = [
    0.00286713; 0.0170664; 0.00668784; 0.0131534; 0.0161359; 0.0347798; 0.0173045; 7.17152e-5; 0.0256791; 0.025584
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]
kr := ruletka(ws2) = [
    27; 2; 26; 4; 44; 7; 46; 2; 17; 20
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]
# Входные параметры:
# w - массив вероятностей
#
# Выходной параметр:
# k - номера выбранных родителей
# Шаг 3. Селекция
selection(kr, v0) :=
    n ← rows(v0)
    K ← cols(v0)
    for j ∈ 1 .. K
        v1[:, j] ← v0[:, kr[j]]
        ff[j] ← f(v1[:, j])
    a ← sort(ff)
    for j ∈ 1 .. K
        for i ∈ 1 .. K
            k1[j] ← j if a[j] == ff[i]
    r ← 0
    for j ∈ 1 .. K/2
        vr[:, r + j] ← v1[:, k1[j]]
        vr[:, r + j + 1] ← v1[:, k1[j + 1]]
        r ← r + 1
    vr
# Входные параметры:
# kr- массив номеров особей для скрещивания
# v0 - массив особей для скрещивания
#
# Выходной параметр:
# vr - массив особей родителей
vr := selection(kr, v0)
vr = [
    2.74194, 1.12903, 1.12903, 0.16129, 0.16129, 0.483871, 0.483871, -3.06452, -3.06452, -2.74194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;
    2.41935, -4.03226, -4.03226, 4.03226, 4.03226, -3.70968, -3.70968, 3.3871, 3.3871, 2.09677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]
ff(vr) = [
    19.9888; 18.5724; 18.5724; 15.4427; 15.4427; 14.3141; 14.3141; 30.572; 30.572; 18.8316
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]
mean(ff(vr)) = 20.9322
# Шаг 4. Кроссинговер
cros(vr, α) :=
    n ← rows(vr)
    rn1 ← cols(vr)
    n1 ← n/2
    for j ∈ 1 .. n1
        rs ← rnd(1)
        m[j] ← (1 + 2*α)*rs - α
    for i ∈ 1 .. rn1
        for j ∈ 1 .. n1
            vs[j, i] ← (1 - m[j])*min(vr[j, i], vr[j + 1, i]) + m[j]*max(vr[j, i], vr[j + 1, i])
            vs[j + n1, i] ← (1 - m[j])*max(vr[j, i], vr[j + 1, i]) + m[j]*min(vr[j, i], vr[j + 1, i])
    vs
# Входные параметры:
# vr - массив родителей
# α - параметр (0 <= α <= 1)
#
# Выходной параметр:
# vs - массив особей потомков
vp := cros(vr, α) = [
    2.13411, -8.59615, -8.59615, -3.26163, -3.26163, -7.41784, -7.41784, -8.76938, -8.76938, -7.02059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;
    3.02718, 5.69293, 5.69293, 7.45518, 7.45518, 4.19203, 4.19203, 9.09196, 9.09196, 6.37542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]
mean(ff(vp)) = 99.2587
ff(vp) = [
    17.3718; 179.961; 179.961; 75.9877; 75.9877; 127.706; 127.706; 236.785; 236.785; 138.622
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]
# Шаг 5. Мутация
mutation(vs, a, b, β) :=
    n ← rows(vs)
    K ← cols(vs)
    for j ∈ 1 .. K
        fm[j] ← f(vs[:, j])
    aa ← sort(fm)
    for j ∈ 1 .. K
        for i ∈ 1 .. K
            k1[i] ← j if fm[j] == aa[i]
    for i ∈ 1 .. K
        for j ∈ 1 .. n
            vm[j, i] ← vs[j, k1[i]]
    n1 ← K/2
    for i ∈ 1 .. n
        for j ∈ 1 .. n1
            r ← rnd(1)
            g ← (vm[i, j + n1] - a)/(b - a)
            g1 ← g if r == g
            g1 ← g - g*((g - r)/g)^β if g > r
            g1 ← g + (1 - g)*((r - g)/(1 - g))^β if g < r
            vm[i, j + n1] ← (1 - g1)*a + g1*b
    vm
# Входные параметры:
# vs - массив потомков
# a,b - границы интервалов
# β - параметр (0<=β<=1)
#
# Выходной параметр:
# vm - массив мутированных особей
vm := mutation(vp, a, b, β)
vm = [
    -1.62484, 2.13411, 1.56362, 1.56362, 1.56362, 1.56362, -2.80315, -2.80315, 1.60096, 1.60096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;
    1.94742, 3.02718, 4.24283, 4.24283, 4.24283, 4.24283, 3.44832, 3.44832, 5.17323, 5.17323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]
mean(ff(vm)) = 38.8332
ff(vm) = [
    9.38972; 17.3718; 22.4325; 22.4325; 22.4325; 22.4325; 28.2076; 28.2076; 32.36; 32.36
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]
# Шаг 6. Элитарный отбор
elitarnyVybor(vr, vm, a, b) :=
    n ← rows(vr)
    K ← cols(vr)
    for j ∈ 1 .. K
        ffr[j] ← f(vr[:, j])
    ar ← sort(ffr)
    for j ∈ 1 .. K
        for i ∈ 1 .. K
            kr[j] ← j if ffr[j] == ar[i]
    for j ∈ 1 .. K
        ffm[j] ← f(vm[:, j])
    am ← sort(ffm)
    for j ∈ 1 .. K
        for i ∈ 1 .. K
            km[i] ← j if ffm[j] == am[i]
    for j ∈ 1 .. K/2
        for i ∈ 1 .. n
            vn[i, j] ← vr[i, kr[j]]
            vn[i, j + K/2] ← vm[i, km[j]]
    vn
# Входные параметры:
# vr - массив родителей
# vm - массив потомков
# a, b - границы интервала
#
# Выходной параметр:
# vт - массив лучших отобранных особей
vn := elitarnyVybor(vr, vm, a, b)
vn = [
    2.74194, 1.12903, 1.12903, 0.16129, 0.16129, 0.483871, 0.483871, -3.06452, -3.06452, -2.74194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;
    2.41935, -4.03226, -4.03226, 4.03226, 4.03226, -3.70968, -3.70968, 3.3871, 3.3871, 2.09677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]
mean(ff(vn)) = 19.3341
ff(vn) = [
    19.9888; 18.5724; 18.5724; 15.4427; 15.4427; 14.3141; 14.3141; 30.572; 30.572; 18.8316
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]
# Итоговая программа
res(a, b, n, K, L, N, e) :=
    k0 ← osobNumber(n, L, K)
    v0 ← zeroPopulation(a, b, k0, L)
    x1 ← ff(v0)
    sr_znac ← mean(x1)
    W ← weights(F, K)
    P ← ws1(W, K)
    k ← ruletka(P)
    vr ← selection(k, v0)
    vp ← cros(vr, α)
    for i ∈ 1 .. N
        vm ← mutation(vp, a, b, β)
        vn ← elitarnyVybor(vr, vm, a, b)
        x1 ← ff(vn)
        sr_znac2 ← mean(x1)
        break if (|(sr_znac - sr_znac2)| < ε)
        sr_znac ← sr_znac2
    vn
cn := res(a, b, n, K, L, 100, ε)
cn = [
    1.45161, -0.806452, -0.806452, 1.45161, 1.45161, 3.70968, 3.70968, 3.3871, 3.3871, 2.41935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;
    2.41935, -4.03226, -4.03226, -3.06452, -3.06452, 1.77419, 1.77419, 1.77419, 1.77419, -4.35484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]
mean(ff(cn)) = 17.9982
ff(cn) = [
    9.40123; 18.5519; 18.5519; 12.6065; 12.6065; 29.9543; 29.9543; 25.1917; 25.1917; 29.7369
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]  # Итоговый результат
kk := match(min(ff(cn)), ff(cn))[1] = 14
vektorXMin(cn, kk, n) :=
    rows ← n
    cols ← kk
    for i ∈ 1 .. n
        vecMin[i] ← cn[i, kk]
    vecMin
vecktorMin := vektorXMin(cn, kk, n)
vecktorMin = [-1.12903; -1.12903]
