# Генерация случайных координат
# Входные данные:
# Number - количество городов
# maxValue - максимальное значение координаты x,y
#
# Выходные данные:
# C - Матрица с позициями x,y городов
rndCoord(Number, maxValue) :=
    for i ∈ 0 .. Number - 1
        C[i, 0] ← rnd(maxValue)
        C[i, 1] ← rnd(maxValue)
    C
Coord := rndCoord(5, 100)
Coord = [0.126842, 19.3323; 58.5006, 35.0308; 82.2838, 17.4129; 71.0495, 30.3986; 9.14113, 14.7313]
# Перетасовка, меняет местами две особи
Shuffle(O) :=
    n ← rows(O)
    osob1 ← ceil(rnd(n - 1))
    osob2 ← osob1
    while osob1 == osob2
        osob2 ← ceil(rnd(n - 1))
    O2 ← O
    O2[osob1] ← O[osob2]
    O2[osob2] ← O[osob1]
    O2
# Входные данные:
# O — исходная особь (вектор порядка городов).
#
# Выходные данные:
# O2 — изменённая особь после перестановки двух случайных позиций.
# Случайная особь
# (полученная путем случайной перетасовки)
rndOsob(n) :=
    for i ∈ 0 .. n - 1
        O[i] ← i
    for i ∈ 0 .. n - 1
        O ← Shuffle(O)
    O
# Входные данные:
# n — количество городов.
#
# Выходные данные:
# O — особь в виде вектора порядка посещения городов (0..n-1 в случайном порядке).
# Начальная популяция состоящая из случайных особей
# Входные данные:
# n — количество городов.
# NOsob — количество особей в популяции.
#
# Выходные данные:
# Pop — матрица популяции, каждая строка — особь (случайный порядок городов).
NACHPOP(n, NOsob) :=
    for i ∈ 0 .. NOsob - 1
        Pop[i] ← rndOsob(n)
    Pop
# Случайная мутация особей популяции
MUT(Pop1) :=
    NOsob ← rows(Pop1)
    for i ∈ 0 .. NOsob - 1
        Pop2[i] ← Shuffle(Pop1[i])
    Pop2
# Входные данные:
# Pop1 — исходная популяция (матрица особей).
# Выходные данные:
# Pop2 — популяция после мутации.
sub(O, i1, i2) := submatrix(O, i1, i2, 0, 0)
# Скрещевание между двумя особями, (скрещиваются участки генома)
# Если скрещивание прошло удачно имеем двух новых особей с новым геномом, иначе 0
crossingover(O1, O2) :=
    n ← rows(O1)
    t ← 3
    br ← 0
    err ← 0
    for i ∈ 1 .. n - t
        break if br == 1
        T1 ← sub(O1, i, i + t - 1)
        sT1 ← sort(T1)
        for j ∈ 1 .. n - t
            break if br == 1
            T2 ← sub(O2, j, j + t - 1)
            sT2 ← sort(T2)
            if |sT1 - sT2| == 0
                O11 ← stack(sub(O1, 0, i - 1), T2, sub(O1, i + t, n - 1)) if i ≠ n - t
                O11 ← stack(sub(O1, 0, i - 1), T2) if i == n - t
                O22 ← stack(sub(O2, 0, j - 1), T1, sub(O2, j + t, n - 1)) if j ≠ n - t
                O22 ← stack(sub(O2, 0, j - 1), T1) if j == n - t
                br ← 1
    return if(br == 1, [O11; O22], 0)
# Входные данные:
# O1, O2 — две особи (родители).
#
# Выходные данные:
# [O11, O22] — два потомка или 0, если скрещивание невозможно.
# Скрещивание особей всей популяции, если ни одна пара не произвела потомства то 0
CROSS(Pop1) :=
    NOsob ← rows(Pop1)
    Pop2 ← 0
    for i ∈ 0 .. NOsob - 1
        if i ≠ NOsob - 1
            O1 ← Pop1[i]
            O2 ← Pop1[i + 1]
        if i == NOsob - 1
            O1 ← Pop1[NOsob - 1]
            O2 ← Pop1[0]
        C ← crossingover(O1, O2)
        if C ≠ 0
            Pop2 ← stack(Pop2, C) if Pop2 ≠ 0
            Pop2 ← C if Pop2 == 0
    Pop2
# Входные данные:
# Pop1 — исходная популяция.
# Выходные данные:
# Pop2 — популяция потомков или 0, если ни одна пара не дала потомства.
# Вычисляем приспособленность особей популяции
# как длинну пути определяемого их геномом
# Входные данные:
# Pop2 — популяция (матрица особей).
# Coord — матрица координат городов.
#
# Выходные данные:
# F — вектор значений приспособленности (длин маршрутов) для каждой особи.
FITNESS(Pop2, Coord) :=
    NOsob ← rows(Pop2)
    n ← rows(Coord)
    for i ∈ 0 .. NOsob - 1
        O ← Pop2[i]
        F[i] ← sum(sqrt((Coord[O[j], 0] - Coord[O[j + 1], 0])^2 + (Coord[O[j], 1] - Coord[O[j + 1], 1])^2), j = 0 .. n - 2) + sqrt((Coord[O[n - 1], 0] - Coord[O[0], 0])^2 + (Coord[O[n - 1], 1] - Coord[O[0], 1])^2)
    F
# Отбираем NOsob особей с геномом определяющим кратчайший путь
# Входные данные:
# Pop2 — исходная популяция.
# Fit — вектор приспособленности.
# NOsob — количество отбираемых особей.
#
# Выходные данные:
# Pop — новая популяция после отбора.
SELECTION(Pop2, Fit, NOsob) :=
    M ← augment(Pop2, Fit)
    M ← csort(M, 1)
    Pop ← sub(M, 0, NOsob - 1)
    Pop
# Сам генетический алгоритм
GenAlg(Coord, Epocha, NOsob) :=
    n ← rows(Coord)
    Pop1 ← NACHPOP(n, NOsob)
    for i ∈ 1 .. Epocha
        Pop2 ← CROSS(Pop1)
        Pop2 ← if(Pop2 == 0, stack(Pop1, MUT(Pop1)), stack(Pop1, MUT(Pop1), Pop2))
        Fit ← FITNESS(Pop2, Coord)
        Pop1 ← SELECTION(Pop2, Fit, NOsob)
    Pop1
# Сам генетический алгоритм:
# -начальная популяция (случайная)
# цикл{
# -скрещевание
# -мутация
# -преспособленность
# -отбор
# }
# Входные данные:
# Coord — матрица координат городов.
# Epocha — количество эпох (поколений).
# NOsob — количество особей в популяции.
#
# Выходные данные:
# Pop1 — финальная популяция после всех эпох (наиболее приспособленные особи).
# Генетический алгоритм для полносвязного графа
# Вызов генетического алгоритма с заданными параметрами для решения задачи коммивояжёра
GENN := GenAlg(Coord, 500, 10)
O := GENN[0]
# настройки графиков
n := rows(O)
i := 0 .. n
U := rndOsob(n)
O := stack(O, [O[0]])
w := 15
U := stack(U, [U[0]])
F(O) := (sum(sqrt((Coord[O[j], 0] - Coord[O[j + 1], 0])^2 + (Coord[O[j], 1] - Coord[O[j + 1], 1])^2), j = 0 .. n - 2) + sqrt((Coord[O[n - 1], 0] - Coord[O[0], 0])^2 + (Coord[O[n - 1], 1] - Coord[O[0], 1])^2))
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# Оптимальное решение
# Случайное решение
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# Множество городов
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F(O) = 174.308
F(U) = 277.029
