# Worksheet setting: ORIGIN = 1
insertVectorToMatrix(matrix, vector) :=
    rowsToInsert ← rows(vector)
    rowsInTarget ← rows(matrix)
    colsInTarget ← cols(matrix)
    targetRow ← rowsInTarget + 1
    toInsert ← vector
    maxLen ← max(rowsToInsert, colsInTarget)
    lenDiff ← maxLen - min(rowsToInsert, colsInTarget)
    target ← matrix if rowsInTarget ≠ 0
    lenDiff ← 0 otherwise
    if lenDiff ≠ 0
        if rowsToInsert < colsInTarget
            for row ∈ 0 .. rowsToInsert - 1
                toInsert[maxLen - row] ← toInsert[rowsToInsert - row]
            for row ∈ 1 .. lenDiff
                toInsert[row] ← 0
        otherwise
            for row ∈ 1 .. rowsInTarget
                for column ∈ 0 .. colsInTarget - 1
                    target[row, maxLen - column] ← target[row, colsInTarget - column]
                for column ∈ 1 .. lenDiff
                    target[row, column] ← 0
    for column ∈ 1 .. maxLen
        target[targetRow, column] ← toInsert[column]
    target
decimal_to_cod2(decimal) :=
    maxIndex ← 8
    maxIndex ← trunc(log(|decimal|, 2)) + 1 if decimal ≠ 0
    currentRemains ← |decimal|
    negativity ← 1 if decimal ≥ 0
    negativity ← -1 otherwise
    for index ∈ 1 .. maxIndex
        out[index] ← 0
        if currentRemains > 0
            newRemains ← mod(currentRemains, 2^(maxIndex - index))
            if newRemains < currentRemains
                out[index] ← negativity
                currentRemains ← newRemains
    out
dec(decimal) :=
    maxIndex ← trunc(log(|decimal|, 2)) + 1
    maxIndex ← 8 if maxIndex < 8
    currentRemains ← |decimal|
    negativity ← 1 if decimal ≥ 0
    negativity ← -1 otherwise
    for index ∈ 1 .. maxIndex
        newRemains ← mod(currentRemains, 2^(maxIndex - index))
        if newRemains < currentRemains
            out[index] ← negativity
            currentRemains ← newRemains
        out[index] ← 0 otherwise
    out
grey_to_cod2(greyVector) :=
    rows ← rows(greyVector)
    negativity ← 1 if min(greyVector) ≥ 0
    negativity ← -1 otherwise
    for row ∈ 1 .. rows
        out[row] ← mod(sum(|greyVector[element]|, element = 1 .. row), 2)*negativity
    out
cod2_to_grey(cod2Vector) :=
    rows ← rows(cod2Vector)
    negativity ← 1 if min(cod2Vector) ≥ 0
    negativity ← -1 otherwise
    for row ∈ 1 .. rows
        out[row] ← |cod2Vector[row - 1]| xor |cod2Vector[row]| if row ≠ 1
        out[row] ← |cod2Vector[row]| otherwise
        out[row] ← out[row]*negativity
    out
cod2_to_decimal(cod2Vector) :=
    rows ← rows(cod2Vector)
    negativity ← 1 if min(cod2Vector) ≥ 0
    negativity ← -1 otherwise
    out ← 0 if max(cod2Vector) == 0 and negativity == 1
    out ← sum(|cod2Vector[rows - i + 1]|*2^(i - 1), i = 1 .. rows)*negativity otherwise
    out
greyMatrix_to_cod2Matrix(cod2Matrix) :=
    rows ← rows(cod2Matrix)
    transpondMatrix ← transpose(cod2Matrix)
    for row ∈ 1 .. rows
        out ← insertVectorToMatrix(out, grey_to_cod2(transpondMatrix[:, row]))
    out
cod2Matrix_to_decimalVector(cod2Matrix) :=
    rows ← rows(cod2Matrix)
    transpondMatrix ← transpose(cod2Matrix)
    for row ∈ 1 .. rows
        out[row] ← cod2_to_decimal(transpondMatrix[:, row])
    out
decimalVector_to_cod2Matrix(decimalVector) :=
    rows ← rows(decimalVector)
    for row ∈ 1 .. rows
        out ← insertVectorToMatrix(out, decimal_to_cod2(decimalVector[row]))
    out
cod2Matrix_to_greyMatrix(cod2Matrix) :=
    rows ← rows(cod2Matrix)
    transpondMatrix ← transpose(cod2Matrix)
    for row ∈ 1 .. rows
        out ← insertVectorToMatrix(out, cod2_to_grey(transpondMatrix[:, row]))
    out
decimalVector_to_greyMatrix(decimalVector) :=
    cod2Matrix ← decimalVector_to_cod2Matrix(decimalVector)
    out ← cod2Matrix_to_greyMatrix(cod2Matrix)
    out
greyMatrix_to_decimalVector(greyMatrix) :=
    cod2Matrix ← greyMatrix_to_cod2Matrix(greyMatrix)
    out ← cod2Matrix_to_decimalVector(cod2Matrix)
    out
someMatrix := [0, 0, 1, 0, 1, 1, 0, 0; 1, 1, 1, 0, 0, 1, 0, 1; 0, 0, 0, 1, 0, 1, 0, 1]
someCode2_1 := [1; 0; 1; 0]
someCode2_2 := [1; 0; 0; 0; 1; 0; 1; 1]
someCode2_3 := [0; 0; 0; 1; 0; 0; 0; 1; 0]
insertVectorToMatrix(someMatrix, someCode2_1) = [0, 0, 1, 0, 1, 1, 0, 0; 1, 1, 1, 0, 0, 1, 0, 1; 0, 0, 0, 1, 0, 1, 0, 1; 0, 0, 0, 0, 1, 0, 1, 0]
insertVectorToMatrix(someMatrix, someCode2_2) = [0, 0, 1, 0, 1, 1, 0, 0; 1, 1, 1, 0, 0, 1, 0, 1; 0, 0, 0, 1, 0, 1, 0, 1; 1, 0, 0, 0, 1, 0, 1, 1]
insertVectorToMatrix(someMatrix, someCode2_3) = [
    0, 0, 0, 1, 0, 1, 1, 0, 0;
    0, 1, 1, 1, 0, 0, 1, 0, 1;
    0, 0, 0, 0, 1, 0, 1, 0, 1;
    0, 0, 0, 1, 0, 0, 0, 1, 0
]
greyMatrix2 := [
    0, 0, 0, 0, 0, 0, 0, 0, 0;
    0, 0, 0, 0, 0, 0, 0, 0, 1;
    0, 1, 1, 0, 0, 0, 0, 0, 0;
    0, 0, 0, 1, 1, 0, 0, 0, 1;
    -1, -1, -1, 0, -1, -1, -1, -1, 0;
    0, 0, 0, 0, 0, 0, -1, -1, -1;
    0, 0, 0, 0, 0, 0, -1, 0, 1;
    0, 0, 0, 0, 0, -1, -1, 0, 0
]
grayDecimal := [0; 1; 128; 33; -363; -5; 6; -8]
decimal := [0; 1; -363; 33; -7; 5; 42; 23]
greyMatrix := [0, 0, 0; 0, 0, 1; 0, 1, 1; 0, 1, 0; -1, -1, 0; 1, 1, 1; 1, 0, 1; -1, 0, 0]
cod2Matrix := [-1, 0, -1, -1, 0, -1, 0, -1, -1; 0, 0, 0, 0, 0, 0, 0, 0, 1; 0, 0, 0, 0, 0, 0, -1, 0, -1]
cod2_to_grey(transpose(cod2Matrix)[:, 1]) = [-1; -1; -1; 0; -1; -1; -1; -1; 0]
grey_to_cod2(transpose(greyMatrix)[:, 1]) = [0; 0; 0]
cod2_to_grey(transpose(cod2Matrix)[:, 2]) = [0; 0; 0; 0; 0; 0; 0; 0; 1]
grey_to_cod2(transpose(greyMatrix)[:, 2]) = [0; 0; 1]
cod2Matrix_to_greyMatrix(cod2Matrix) = [-1, -1, -1, 0, -1, -1, -1, -1, 0; 0, 0, 0, 0, 0, 0, 0, 0, 1; 0, 0, 0, 0, 0, 0, -1, -1, -1]
greyMatrix_to_cod2Matrix(greyMatrix2) = [
    0, 0, 0, 0, 0, 0, 0, 0, 0;
    0, 0, 0, 0, 0, 0, 0, 0, 1;
    0, 1, 0, 0, 0, 0, 0, 0, 0;
    0, 0, 0, 1, 0, 0, 0, 0, 1;
    -1, 0, -1, -1, 0, -1, 0, -1, -1;
    0, 0, 0, 0, 0, 0, -1, 0, -1;
    0, 0, 0, 0, 0, 0, -1, -1, 0;
    0, 0, 0, 0, 0, -1, 0, 0, 0
]
cod2_to_decimal(transpose(cod2Matrix)[:, 1]) = -363
cod2_to_decimal(transpose(cod2Matrix)[:, 2]) = 1
decimal_to_cod2(decimal[4]) = [1; 0; 0; 0; 0; 1]
decimal_to_cod2(decimal[0]) =  # error: Индекс массива является недопустимым для этого массива.
decimalVector_to_greyMatrix(grayDecimal) = [
    0, 0, 0, 0, 0, 0, 0, 0, 0;
    0, 0, 0, 0, 0, 0, 0, 0, 1;
    0, 1, 1, 0, 0, 0, 0, 0, 0;
    0, 0, 0, 1, 1, 0, 0, 0, 1;
    -1, -1, -1, 0, -1, -1, -1, -1, 0;
    0, 0, 0, 0, 0, 0, -1, -1, -1;
    0, 0, 0, 0, 0, 0, 1, 0, 1;
    0, 0, 0, 0, 0, -1, -1, 0, 0
]
cod2Matrix_to_decimalVector(cod2Matrix) = [-363; 1; -5]
cod2Matrix_to_decimalVector(greyMatrix) = [0; 1; 3; 2; -6; 7; 5; -4]
greyMatrix_to_decimalVector(greyMatrix) = [0; 1; 2; 3; -4; 5; 6; -7]
decimalVector_to_cod2Matrix(decimal) = [
    0, 0, 0, 0, 0, 0, 0, 0, 0;
    0, 0, 0, 0, 0, 0, 0, 0, 1;
    -1, 0, -1, -1, 0, -1, 0, -1, -1;
    0, 0, 0, 1, 0, 0, 0, 0, 1;
    0, 0, 0, 0, 0, 0, -1, -1, -1;
    0, 0, 0, 0, 0, 0, 1, 0, 1;
    0, 0, 0, 1, 0, 1, 0, 1, 0;
    0, 0, 0, 0, 1, 0, 1, 1, 1
]
rndPlus(matrix) :=
    rows ← rows(matrix)
    for row ∈ 1 .. rows
        out[row] ← matrix[row, 1] + rnd(1)*(matrix[row, 2] - matrix[row, 1])
    out
realVector_to_cod2Matrix(vector, L, ab) :=
    codeLen ← 2^L - 1
    rows ← rows(vector)
    for row ∈ 1 .. rows
        decimal[row] ← round(codeLen*(vector[row] - ab[row, 1])/(ab[row, 2] - ab[row, 1]))
    out ← decimalVector_to_cod2Matrix(decimal)
    out
cod2Matrix_to_realVector(matrix, ab) :=
    rows ← rows(matrix)
    L ← cols(matrix)
    codeLen ← 2^L - 1
    decimal ← cod2Matrix_to_decimalVector(matrix)
    for row ∈ 1 .. rows
        out[row] ← ab[row, 1] + decimal[row]*(ab[row, 2] - ab[row, 1])/codeLen
    out
realVector_to_greyMatrix(vector, L, ab) :=
    cod2Matrix ← realVector_to_cod2Matrix(vector, L, ab)
    out ← cod2Matrix_to_greyMatrix(cod2Matrix)
    out
greyMatrix_to_realVector(matrix, ab) :=
    cod2Matrix ← greyMatrix_to_cod2Matrix(matrix)
    out ← cod2Matrix_to_realVector(cod2Matrix, ab)
    out
ab := [-1, 0; -7, 5; 0, 7]
L := 5
realVector := rndPlus(ab) = [-0.998732; -4.68012; 4.09504]
greyMatrixFromRndPlus := [0, 0, 0, 0; 1, 0, 0, 0; -1, -1, -1, -1]
cod2MatrixFromRndPlus := [1, 1, 0, 0, 1; 0, 1, 0, 1, 0; -1, -1, 0, 0, -1]
realVector_to_cod2Matrix(realVector, L, ab) = [0, 0, 0, 0, 0, 0, 0, 0; 0, 0, 0, 0, 0, 1, 1, 0; 0, 0, 0, 1, 0, 0, 1, 0]
cod2Matrix_to_realVector(cod2MatrixFromRndPlus, ab) = [-0.193548; -3.12903; -5.64516]
realVector_to_greyMatrix(realVector, L, ab) = [0, 0, 0, 0, 0, 0, 0, 0; 0, 0, 0, 0, 0, 1, 0, 1; 0, 0, 0, 1, 1, 0, 1, 1]
greyMatrix_to_realVector(greyMatrixFromRndPlus, ab) = [-1; 5; -4.66667]
