# Worksheet setting: ORIGIN = 1
myf(x) := 2*x^2 + 1
populationSize := 10
weight(f, x) :=
    K ← rows(x)
    denominatior ← sum(|f(x[i])|, i = 1 .. K)
    for i ∈ 1 .. K
        out[i] ← |f(x[i])|/denominatior
    out
probability(w) :=
    K ← rows(w)
    denominator ← sum(1/(0.1 + w[i]), i = 1 .. K)
    for i ∈ 1 .. K
        out[i] ← 1/(0.1 + w[i])/denominator*100
    out
cod2_to_decimal(cod2Vector) :=
    rows ← rows(cod2Vector)
    negativity ← 1 if min(cod2Vector) ≥ 0
    negativity ← -1 otherwise
    out ← 0 if max(cod2Vector) == 0 and negativity == 1
    out ← sum(|cod2Vector[rows - i + 1]|*2^(i - 1), i = 1 .. rows)*negativity otherwise
    out
insertVectorToMatrixInRow(matrix, vector, targetRow) :=
    rowsToInsert ← rows(vector)
    rowsInTarget ← rows(matrix)
    colsInTarget ← cols(matrix)
    toInsert ← vector
    maxLen ← max(rowsToInsert, colsInTarget)
    lenDiff ← maxLen - min(rowsToInsert, colsInTarget)
    target ← matrix if rowsInTarget ≠ 0
    lenDiff ← 0 otherwise
    if lenDiff ≠ 0
        if rowsToInsert < colsInTarget
            for row ∈ 0 .. rowsToInsert - 1
                toInsert[maxLen - row] ← toInsert[rowsToInsert - row]
            for row ∈ 1 .. lenDiff
                toInsert[row] ← 0
        otherwise
            for row ∈ 1 .. rowsInTarget
                for column ∈ 0 .. colsInTarget - 1
                    target[row, maxLen - column] ← target[row, colsInTarget - column]
                for column ∈ 1 .. lenDiff
                    target[row, column] ← 0
    for column ∈ 1 .. maxLen
        target[targetRow, column] ← toInsert[column]
    target
a := -31
init_population(a, b, count) :=
    for elem ∈ 1 .. count
        out[elem] ← a + floor(rnd(b - a + 1))
    out
grey_to_cod2(greyVector) :=
    rows ← rows(greyVector)
    negativity ← 1 if min(greyVector) ≥ 0
    negativity ← -1 otherwise
    for row ∈ 1 .. rows
        out[row] ← mod(sum(|greyVector[element]|, element = 1 .. row), 2)*negativity
    out
decimal_to_cod2(decimal) :=
    maxIndex ← 1
    maxIndex ← trunc(log(|decimal|, 2)) + 1 if decimal ≠ 0
    currentRemains ← |decimal|
    negativity ← 1 if decimal ≥ 0
    negativity ← -1 otherwise
    for index ∈ 1 .. maxIndex
        out[index] ← 0
        if currentRemains ≠ 0
            newRemains ← mod(currentRemains, 2^(maxIndex - index))
            if newRemains < currentRemains
                out[index] ← negativity
                currentRemains ← newRemains
    out
cod2_to_grey(cod2Vector) :=
    rows ← rows(cod2Vector)
    negativity ← 1 if min(cod2Vector) ≥ 0
    negativity ← -1 otherwise
    for row ∈ 1 .. rows
        out[row] ← |cod2Vector[row - 1]| xor |cod2Vector[row]| if row ≠ 1
        out[row] ← |cod2Vector[row]| otherwise
        out[row] ← out[row]*negativity
    out
insertVectorToMatrix(matrix, vector) :=
    rowsInTarget ← rows(matrix)
    targetRow ← rowsInTarget + 1
    insertVectorToMatrixInRow(matrix, vector, targetRow)
b := 31
generationCounts := 5
# xT = 0
accuracy := 0.001
ruletka(p) :=
    rows ← rows(p)
    for row ∈ 1 .. rows
        dart ← rnd(100)
        sector ← 0
        for elem ∈ 1 .. rows
            sector ← sector + p[elem]
            if sector ≥ dart
                out[row] ← elem
                break
    out
.
vibor(pull, population) :=
    rows ← rows(pull)
    for row ∈ 1 .. rows
        out[row] ← population[pull[row]]
    out
cod2Matrix_to_decimalVector(cod2Matrix) :=
    rows ← rows(cod2Matrix)
    transpondMatrix ← transpose(cod2Matrix)
    for row ∈ 1 .. rows
        out[row] ← cod2_to_decimal(transpondMatrix[:, row])
    out
cod2Matrix_to_greyMatrix(cod2Matrix) :=
    rows ← rows(cod2Matrix)
    transpondMatrix ← transpose(cod2Matrix)
    for row ∈ 1 .. rows
        out ← insertVectorToMatrix(out, cod2_to_grey(transpondMatrix[:, row]))
    out
decimalVector_to_cod2Matrix(decimalVector) :=
    rows ← rows(decimalVector)
    for row ∈ 1 .. rows
        out ← insertVectorToMatrix(out, decimal_to_cod2(decimalVector[row]))
    out
elitar(f, parents, childrens, a, b) :=
    rows ← rows(parents)
    fParents ← f(parents)
    fChildrens ← f(childrens)
    fParentsSoreted ← sort(fParents)
    fChildrensSorted ← sort(fChildrens)
    for row ∈ 1 .. round(rows/2)
        firstRow ← row*2 - 1
        secondRow ← mod(firstRow + 1, rows + mod(rows + 1, 2))
        for elem ∈ 1 .. rows
            if fChildrens[elem] == fChildrensSorted[row]
                out[firstRow] ← childrens[elem]
                break
        if secondRow > firstRow
            for elem ∈ 1 .. rows
                if fParents[elem] == fParentsSoreted[row]
                    out[secondRow] ← parents[elem]
                    break
    out
mut(population, a, b) :=
    population_cod2Matrix ← decimalVector_to_cod2Matrix(population)
    transpond_population_cod2Matrix ← transpose(population_cod2Matrix)
    rows ← rows(population_cod2Matrix)
    cols ← cols(population_cod2Matrix)
    p ← 1/cols
    for row ∈ 1 .. rows
        out[row] ←
            if rnd(1) < p
                mutation_index ← floor(1 + rnd(cols))
                grey ← cod2_to_grey(transpond_population_cod2Matrix[:, row])
                grey[mutation_index] ←
                    0 if grey[mutation_index] ≠ 0
                    1 otherwise
                cod2_to_decimal(grey_to_cod2(grey))
            population[row] otherwise
    for row ∈ 1 .. rows
        if out[row] < a
            out[row] ← a
            continue
        out ← b if out[row] > b
    out
crosingover(parents, a, b) :=
    cod2_parents ← decimalVector_to_cod2Matrix(parents)
    rows ← rows(cod2_parents)
    cols ← cols(cod2_parents)
    inverted_cod2_Parents ← transpose(cod2_parents)
    for row ∈ 1 .. round(rows/2)
        changing_index ← floor(1 + rnd(cols))
        firstRow ← row*2 - 1
        secondRow ← mod(firstRow + 1, rows + mod(rows + 1, 2))
        out ← insertVectorToMatrix(out, inverted_cod2_Parents[:, firstRow])
        out[firstRow, changing_index] ← cod2_parents[secondRow, changing_index]
        if secondRow > firstRow
            out ← insertVectorToMatrix(out, inverted_cod2_Parents[:, secondRow])
            out[secondRow, changing_index] ← cod2_parents[firstRow, changing_index]
        if out[firstRow, changing_index]*out[secondRow, changing_index] == -1
            out[firstRow, changing_index] ← 0
            out[secondRow, changing_index] ← 0 if secondRow > firstRow
    out ← cod2Matrix_to_decimalVector(out)
    for row ∈ 1 .. rows
        if out[row] < a
            out[row] ← a
            continue
        out ← b if out[row] > b
    out
genetycAlg(f, a, b, k, n, e) :=
    population ← init_population(a, b, k)
    for generation ∈ n
        weights ← weight(f, population)
        probabilities ← probability(weights)
        pull ← ruletka(probabilities)
        parents ← vibor(pull, population)
        newPopulation ← mut(crosingover(parents, a, b), a, b)
        population ← elitar(f, parents, newPopulation, a, b)
        minF ← min(f(population))
        break if minF ≤ e
    for pop ∈ 1 .. k
        out ← population[pop] if f(population[pop]) == minF
    out
firstGeneration := init_population(a, b, populationSize) = [-19; 31; 9; -21; -14; 21; -8; -17; -17; 30]
func := myf(firstGeneration) = [723; 1923; 163; 883; 393; 883; 129; 579; 579; 1801]
w := weight(myf, firstGeneration) = [0.0897468; 0.238704; 0.0202334; 0.109608; 0.0487835; 0.109608; 0.0160129; 0.0718719; 0.0718719; 0.22356]
p := probability(w) = [9.38598; 5.25816; 14.8125; 8.49663; 11.9701; 8.49663; 15.3514; 10.3621; 10.3621; 5.50426]
sumP := sum(p) = 100
parentsPull := ruletka(p) = [1; 3; 1; 7; 5; 1; 7; 7; 6; 1]
viborParents := vibor(parentsPull, firstGeneration) = [-19; 9; -19; -8; -14; -19; -8; -8; 21; -19]
crosingoverRes := crosingover(viborParents, a, b) = [-27; 1; -18; -9; -30; -3; -8; -8; 20; -18]
fLect(x) := 5 - 24*x + 17*x^2 - 11/3*x^3 + 1/4*x^4
aLect := 0
bLect := 8
mutation := mut(crosingoverRes, a, b) = [-27; 1; -18; -9; -30; -3; -8; -8; 23; -17]
elitarResults := elitar(myf, viborParents, mutation, a, b) = [1; -8; -3; -8; -8; -8; -8; 9; -9; -14]
resLect := genetycAlg(fLect, aLect, bLect, populationSize, generationCounts, accuracy) = 1
res := genetycAlg(myf, a, b, populationSize, generationCounts, accuracy) = 0
fLect(resLect) = -5.41667
myf(res) = 1
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