# Worksheet setting: ORIGIN = 1
ε := 0.001
L := 5
a := -7  # ВХОДНЫЕ ДАННЫЕ
K := 50
b := 7  # Вариант 2
f(x) := sqrt(1 + x^2) + e^(-2*x)
# Шаг2. Перевод чисел в код Грея и из него
# Шаг1. Формирование начальной популяции
codg(c, a, b) :=
    K ← rows(c)
    L ← cols(c)
    for j ∈ 1 .. K
        kk[j] ← 1 if sum(c[j, i], i = 1 .. L) ≥ 0
        kk[j] ← -1 otherwise
    for j ∈ 1 .. K
        g[j, 1] ← c[j, 1]
        if kk[j] == 1
            for k ∈ 2 .. L
                g[j, k] ← 0 if (c[j, k - 1] + c[j, k]) == 0 or (c[j, k - 1] + c[j, k]) == 2
                g[j, k] ← 1 otherwise
        otherwise
            for k ∈ 2 .. L
                g[j, k] ← 0 if (c[j, k - 1] + c[j, k]) == 0 or (c[j, k - 1] + c[j, k]) == -2
                g[j, k] ← -1 otherwise
    g
# Входные параметры:
# a, b - границы интервала
# c - матрица-бит чисел в двоичном коде
#
# Выходной параметр:
# g - матрица-бит чисел в коде Грея
zero_pop(a, b, L, K) :=
    for j ∈ 1 .. K
        z[j] ← round(rnd(10)/10)
        z[j] ← 0 if a ≥ 0
        z[j] ← 1 if b ≤ 0
    k1 ← 1 if a ≥ 0
    k1 ← -1 if a < 0 or b ≤ 0
    for j ∈ 1 .. K
        for i ∈ 1 .. L
            c0[j, i] ← k1^z[j]*round(rnd(10)/10)
    g0 ← codg(c0, a, b)
    g0
# Входные параметры:
# a, b - границы интервала
# L - длина хромосомы
# K - количество особей
#
# Выходные параметры:
# g0 - массив особей начальной популяции
2.
binToDec(c, a, b) :=
    K ← rows(c)
    L ← cols(c)
    for j ∈ 1 .. K
        v1[j] ← sum(c[j, k]*2^(L - k), k = 1 .. L)
    if a ≥ 0
        r ← (2^L - 1)/(b - a)
        for j ∈ 1 .. K
            v[j] ← v1[j]/r + a
    if b ≤ 0
        r ← (2^L - 1)/(b - a)
        for j ∈ 1 .. K
            v[j] ← v1[j]/r + b
    if a < 0 and b > 0
        r1 ← (2^L - 1)/|a|
        r2 ← (2^L - 1)/b
        for j ∈ 1 .. K
            v[j] ← v1[j]/r1 if v1[j] ≤ 0
            v[j] ← v1[j]/r2 if v1[j] ≥ 0
    v
# Входные параметры:
# a, b - границы интервала
# c - матрица-бит чисел в двоичном коде
#
# Выходной параметр:
# v - десятичной системе счисления
grayToDec(g, a, b) :=
    K ← rows(g)
    L ← cols(g)
    for j ∈ 1 .. K
        kk[j] ← 1 if sum(g[j, i], i = 1 .. L) ≥ 0
        kk[j] ← -1 otherwise
    for j ∈ 1 .. K
        if kk[j] == 1
            for i ∈ 1 .. L
                c[j, i] ← 0 if sum(g[j, k], k = 1 .. i) == 0 or mod(sum(g[j, k], k = 1 .. i), 2) == 0
                c[j, i] ← 1 otherwise
        otherwise
            for i ∈ 1 .. L
                c[j, i] ← 0 if sum(g[j, k], k = 1 .. i) == 0 or mod(sum(g[j, k], k = 1 .. i), 2) == 0
                c[j, i] ← -1 otherwise
    v ← binToDec(c, a, b)
    v
# Входные параметры:
# a, b - границы интервала
# g - матрица-бит чисел в коде Грея
#
# Выходной параметр:
# v - число в десятичной системе счисления
g0 := zero_pop(a, b, L, K)
g0 = [
    1, 1, 0, 1, 1;
    -1, 0, 0, 0, 0;
    0, 1, 1, 1, 1;
    1, 1, 0, 0, 1;
    0, -1, 0, 0, 0;
    -1, 0, 0, 0, 0;
    0, 0, -1, -1, 0;
    -1, -1, 0, 0, 0;
    0, -1, -1, 0, -1;
    0, 1, 1, 0, 0
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]
v0 := grayToDec(g0, a, b) = [
    4.06452; -7; 2.25806; 3.83871; -3.3871; -7; -0.903226; -3.6129; -2.03226; 1.80645
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]
f(v0) = [
    4.18602; 1202611; 2.48052; 3.96729; 878.505; 1202611; 7.43633; 1378.2; 60.5017; 2.09174
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]
mean(f(v0)) = 66180
# Шаг3.  Выбрать K родителей из популяции при помощи рулетки
# Входные параметры:
# weights - массив весов
# K - количество особей
#
# Выходной параметр:
# arrayP - массив вероятностей
# Расчет весов | Расчет вероятностей
weightsArray(x, K) :=
    for j ∈ 1 .. K
        weights[j] ← |f(x[j])|/sum(|f(x[k])|, k = 1 .. K)
    weights
# Входные параметры:
# x - набор особей
# K - количество особей
#
# Выходной параметр:
# weights - массив весов
pArray(weights, K) :=
    for i ∈ 1 .. K
        arrayP[i] ← 1/(0.1 + weights[i])/sum(1/(0.1 + weights[j]), j = 1 .. K)*100
    arrayP
weights := weightsArray(v0, K)
arrayP := pArray(v0, K)
# Выбор родителей
weights = [
    1.26504e-6; 0.363437; 7.49628e-7; 1.19894e-6; 0.00026549; 0.363437; 2.2473e-6; 0.000416499; 1.8284e-5; 6.32138e-7
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]
ruletka(arrayP) :=
    n ← rows(arrayP)
    for j ∈ 1 .. n
        k[j] ← j
    for j ∈ 1 .. n
        r[j] ← round(rnd(100))
    for j ∈ 1 .. n
        for i ∈ 1 .. n
            if r[j] ≥ sum(arrayP[m], m = 1 .. i)
                k[j] ← i
                continue
    k
arrayP = [
    -6.33592; 3.82406; -11.1897; -6.69916; 8.02716; 3.82406; 32.8501; 7.51118; 13.6555; -13.8404
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]
k := ruletka(arrayP)
k = [
    45; 36; 45; 49; 45; 6; 48; 47; 6; 49
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]
# Шаг4. Выбор особей для скрещивания
vybor(kr, g0, a, b) :=
    n ← rows(kr)
    L ← cols(g0)
    for j ∈ 1 .. n
        for i ∈ 1 .. L
            g1[j, i] ← g0[kr[j], i]
    v ← grayToDec(g1, a, b)
    ff ← f(v)
    a ← sort(ff)
    for j ∈ 1 .. n
        for i ∈ 1 .. n
            k1[i] ← kr[j] if ff[j] == a[i]
    r ← 0
    for j ∈ 1 .. n/2
        for i ∈ 1 .. L
            gr[j + r, i] ← g0[k1[j], i]
            gr[j + r + 1, i] ← g0[k1[j + 1], i]
        r ← r + 1
    gr
# Входные параметры:
# kr - массив номеров особей для скрещивания
# g0 - массив особей для скрещивания в коде Грея
# a, b - границы интервала
#
# Выходной параметр:
# gr - массив выбранных особей в коде Грея
gr := vybor(k, g0, a, b)
vr := grayToDec(gr, a, b) = [
    3.16129; 3.16129; 3.16129; 4.06452; 4.06452; 4.06452; 4.06452; 4.06452; 4.06452; 4.06452
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]
f(vr) = [
    3.31748; 3.31748; 3.31748; 4.18602; 4.18602; 4.18602; 4.18602; 4.18602; 4.18602; 4.18602
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]
gr = [
    0, 1, 0, 0, 1;
    0, 1, 0, 0, 1;
    0, 1, 0, 0, 1;
    1, 1, 0, 1, 1;
    1, 1, 0, 1, 1;
    1, 1, 0, 1, 1;
    1, 1, 0, 1, 1;
    1, 1, 0, 1, 1;
    1, 1, 0, 1, 1;
    1, 1, 0, 1, 1
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]
# Шаг5. Скрещивание(Кроссинговер)
crossingover(gr) :=
    n ← rows(gr)
    L ← cols(gr)
    for j ∈ 1 .. n
        k[j] ← 1 if sum(gr[j, i], i = 1 .. L) ≥ 0
        k[j] ← -1 otherwise
    for j ∈ 1 .. n
        for i ∈ 1 .. L
            gs[j, i] ← gr[j, i]
    for j ∈ 1 .. n/2
        rs[j] ← round(rnd(L))
        rs[j] ← 1 if rs[j] == 0
    r ← 0
    for j ∈ 1 .. n/2
        gs[j + r, rs[j]] ← gr[j + 1 + r, rs[j]]
        gs[j + r + 1, rs[j]] ← gr[j + r, rs[j]]
        if k[j + r]*k[j + 1 + r] == -1
            gs[j + r, rs[j]] ← 0
            gs[j + r + 1, rs[j]] ← 0
        r ← r + 1
    gs
# Входной параметр:
# gr - массив выбранных особей в коде Грея для скрещивания
#
# Выходной параметр:
# gs - массив потомков в коде Грея
gp := crossingover(gr)
vp := grayToDec(gp, a, b) = [
    3.16129; 3.16129; 3.16129; 4.06452; 4.06452; 4.06452; 4.06452; 4.06452; 4.06452; 4.06452
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]
gp = [
    0, 1, 0, 0, 1;
    0, 1, 0, 0, 1;
    0, 1, 0, 0, 1;
    1, 1, 0, 1, 1;
    1, 1, 0, 1, 1;
    1, 1, 0, 1, 1;
    1, 1, 0, 1, 1;
    1, 1, 0, 1, 1;
    1, 1, 0, 1, 1;
    1, 1, 0, 1, 1
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]
fp := f(vp) = [
    3.31748; 3.31748; 3.31748; 4.18602; 4.18602; 4.18602; 4.18602; 4.18602; 4.18602; 4.18602
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]
mean(fp) = 4.59733
# Шаг 6. Мутация
mutation(g) :=
    n ← rows(g)
    L ← cols(g)
    for j ∈ 1 .. n
        for i ∈ 1 .. L
            g1[j, i] ← g[j, i]
    for j ∈ 1 .. n
        k1[j] ← 1 if sum(g[j, i], i = 1 .. L) ≥ 0
        k1[j] ← -1 otherwise
    p ← 1/L
    for j ∈ 1 .. n
        x ← rnd(1)
        if x < p
            k ← trunc(rnd(L)) + 1
            g1[j, k] ← 0 if g[j, k] == 1 or g[j, k] == -1
            g[j, k] == k1[j] otherwise
    g1
# Входной параметр:
# g - матрица особей для мутации в коде Грея
#
# Выходной параметр:
# g1 - матрица мутировавших особей в коде Грея
gm := mutation(gp)
vm := grayToDec(gm, a, b) = [
    3.16129; 3.16129; 3.16129; 4.06452; 4.06452; 4.06452; 4.06452; 4.06452; 4.06452; 4.06452
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]
fm := f(vm) = [
    3.31748; 3.31748; 3.31748; 4.18602; 4.18602; 4.18602; 4.18602; 4.18602; 4.18602; 4.18602
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]
gm = [
    0, 1, 0, 0, 1;
    0, 1, 0, 0, 1;
    0, 1, 0, 0, 1;
    1, 1, 0, 1, 1;
    1, 1, 0, 1, 1;
    1, 1, 0, 1, 1;
    1, 1, 0, 1, 1;
    1, 1, 0, 1, 1;
    1, 1, 0, 1, 1;
    1, 1, 0, 1, 1
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]
mean(fm) = 4.59844
# Шаг 7. Элитарный отбор
elitarniyVybor(gr, gm, a, b) :=
    n ← rows(gr)
    L ← cols(gr)
    vr ← grayToDec(gr, a, b)
    ffr ← f(vr)
    ar ← sort(ffr)
    for j ∈ 1 .. n
        for i ∈ 1 .. n
            kr[i] ← j if ffr[j] == ar[i]
    vm ← grayToDec(gm, a, b)
    ffm ← f(vm)
    am ← sort(ffm)
    for j ∈ 1 .. n
        for i ∈ 1 .. n
            km[i] ← j if ffm[j] == am[i]
    for j ∈ 1 .. n/2
        for i ∈ 1 .. L
            gn[j, i] ← gr[kr[j], i]
            gn[j + n/2, i] ← gr[km[j], i]
    gn
# Входные параметры:
# gr - матрица особей родителей в коде Грея
# gm - матрица особей после мутации в коде Грея
# a,b - границы интервала
#
# Выходной параметр:
# g1 - матрица мутировавших особей в коде Грея
gn := elitarniyVybor(gr, gm, a, b)
vn := grayToDec(gn, a, b) = [
    3.16129; 3.16129; 3.16129; 4.06452; 4.06452; 4.06452; 4.06452; 4.06452; 4.06452; 4.06452
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]
gn = [
    0, 1, 0, 0, 1;
    0, 1, 0, 0, 1;
    0, 1, 0, 0, 1;
    1, 1, 0, 1, 1;
    1, 1, 0, 1, 1;
    1, 1, 0, 1, 1;
    1, 1, 0, 1, 1;
    1, 1, 0, 1, 1;
    1, 1, 0, 1, 1;
    1, 1, 0, 1, 1
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]
fn := f(vn) = [
    3.31748; 3.31748; 3.31748; 4.18602; 4.18602; 4.18602; 4.18602; 4.18602; 4.18602; 4.18602
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]
mean(fn) = 4.08179
programmBin(a, b, L, K, N, ε) :=
    c0 ← zero_pop(a, b, L, K)
    x0 ← binToDec(c0, a, b)
    max ← mean(f(x0))
    i ← 0
    while i < N
        i ← i + 1
        arrayP ← pArray(weightsArray(x0, K), K)
        k ← ruletka(arrayP)
        cr ← vybor(k, c0, a, b)
        cp ← crossingover(cr)
        cm ← mutation(cp)
        cn ← elitarniyVybor(cr, cm, a, b)
        f_x ← f(binToDec(cn, a, b))
        best ← mean(f_x)
        break if |max - best| ≤ ε
        max ← best
        x0 ← binToDec(cn, a, b)
    x0
programmGray(a, b, L, K, N, ε) :=
    c0 ← zero_pop(a, b, L, K)
    x0 ← grayToDec(c0, a, b)
    max ← mean(f(x0))
    i ← 0
    while i < N
        i ← i + 1
        arrayP ← pArray(weightsArray(x0, K), K)
        k ← ruletka(arrayP)
        gr ← vybor(k, g0, a, b)
        gp ← crossingover(gr)
        gm ← mutation(gp)
        gn ← elitarniyVybor(gr, gm, a, b)
        f_x ← f(grayToDec(gn, a, b))
        best ← mean(f_x)
        break if |max - best| ≤ ε
        max ← best
        x0 ← grayToDec(gn, a, b)
    x0
r1 := programmGray(a, b, L, K, 50, ε) = [
    0.903226; 0.903226; 0.903226; 0.903226; 0.903226; 2.25806; 2.25806; 2.48387; 2.48387; 2.48387
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]
r := programmBin(a, b, L, K, 100, ε) = [
    0.451613; 0.677419; 0.677419; 0.677419; 0.677419; 0.677419; 0.677419; 0.677419; 0.677419; 0.677419
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]
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f(r) = [
    1.50251; 1.46584; 1.46584; 1.46584; 1.46584; 1.46584; 1.46584; 1.46584; 1.46584; 1.46584
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]
f(r1) = [
    1.51176; 1.51176; 1.51176; 1.51176; 1.51176; 2.48052; 2.48052; 2.68457; 2.68457; 2.68457
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]
K = 50
L = 5
y := 0
Minimize(f, y) = 0.650045
kk := match(min(f(r1)), f(r1))[1]
f(0.65) = 1.46522
r1[kk] = 0.903226
