# Worksheet setting: ORIGIN = 1
b := 7
L := 5
K := 100
ε := 0.001
α := 1
β := 0.5
# a, b - границы интервала
# L - длина хромосомы
# K - количество особей в популяции
# Епсилон - допустимая погрешность
# Входные параметры
a := -7
N := 50
f(x) := sqrt(1 + x^2) + e^(-2*x)
# Выбор особей для начальной популяции
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osobNumber(L, K) :=
    N ← 2^L - 1
    for j ∈ 1 .. K
        kn[j] ← j
    for j ∈ 1 .. K
        kn[j] ← round(rnd(N))
    kn
k0 := osobNumber(L, K) = [
    0; 6; 18; 11; 26; 5; 22; 9; 3; 5
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]
# Входные параметры:
# L - длина хромосомы
# K - количество особей в популяции
#
# Выходной параметр:
# kn - номера генов  в популяции
# Шаг 1. Формирование начальной популяции
1/(0.1 + |f(x[j])|)
zeroPopulation(a, b, kn, L) :=
    n ← rows(kn)
    N ← 2^L - 1
    for j ∈ 1 .. n
        v0[j] ← a + kn[j]*(b - a)/N
    v0
# Входные параметры:
# a,b - границы интервала
# kn - номера генов  в популяции
# K - количество особей в популяции
#
# Выходной параметр:
# v0 - начальная популяция
v0 := zeroPopulation(a, b, k0, L) = [
    -7; -4.29032; 1.12903; -2.03226; 4.74194; -4.74194; 2.93548; -2.93548; -5.64516; -4.74194
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]
mean(f(v0)) = 59447
# Шаг 2. Выбор родителей с помощью рулетки
f(v0) = [
    1202611; 5331.95; 1.61277; 60.5017; 4.84631; 13150.8; 3.10396; 357.693; 80049; 13150.8
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]
ws(x, K) :=
    sum ← sum(|f(x[j])|, j = 1 .. K)
    for i ∈ 1 .. K
        p[i] ← |f(x[i])|/sum
    p
# Входные параметры:
# x - популяция
# K - число особей в популяции
#
# Выходной параметр:
# p - массив вероятностей для выбора родителя
w := ws(v0, K)
w = [
    0.2023; 0.000896925; 2.71295e-7; 1.01774e-5; 8.15232e-7; 0.00221219; 5.22139e-7; 6.01701e-5; 0.0134656; 0.00221219
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]
ruletka(w) :=
    n ← rows(w)
    w1 ← sort(w)
    for j ∈ 1 .. n
        k[j] ← j
    for j ∈ 1 .. n
        r[j] ← rnd(1)
    for j ∈ 1 .. n
        for i ∈ 1 .. n
            if r[j] ≥ sum(w1[m], m = 1 .. i)
                k[j] ← i
                continue
    k
# Входные параметры:
# w - массив вероятностей
#
# Выходной параметр:
# k - номера выбранных родителей
kr := ruletka(w)
kr = [
    97; 97; 98; 97; 98; 95; 95; 97; 94; 94
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]
# Шаг 3. Селекция
selection(kr, v0) :=
    n ← rows(v0)
    for j ∈ 1 .. n
        v1[j] ← v0[kr[j]]
    ff ← f(v1)
    a ← sort(ff)
    for j ∈ 1 .. n
        for i ∈ 1 .. n
            k1[i] ← j if ff[j] == a[i]
    r ← 0
    for j ∈ 1 .. n/2
        vr[j + r] ← v1[k1[j]]
        vr[j + r + 1] ← v1[k1[j + 1]]
        r ← r + 1
    vr
# Входные параметры:
# kr- массив номеров особей для скрещивания
# v0 - массив особей для скрещивания
#
# Выходной параметр:
# vr - массив особей родителей
vr := selection(kr, v0)
vr = [
    0.677419; 0.677419; 0.677419; 0.677419; 0.677419; 0.677419; 0.677419; 0.677419; 0.677419; 0.677419
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]
f(vr) = [
    1.46584; 1.46584; 1.46584; 1.46584; 1.46584; 1.46584; 1.46584; 1.46584; 1.46584; 1.46584
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]
# Шаг 4. Кроссинговер
crossingover(vr, α) :=
    n ← rows(vr)
    for j ∈ 1 .. n/2
        rs ← rnd(1)
        m[j] ← (1 + 2*α)*rs - α
    r ← 0
    for j ∈ 1 .. n/2
        vs[j + r] ← (1 - m[j])*min(vr[j + r], vr[j + r + 1]) + m[j]*max(vr[j + r], vr[j + r + 1])
        vs[j + r + 1] ← (1 - m[j])*min(vr[j + r], vr[j + r + 1]) + m[j]*max(vr[j + r], vr[j + r + 1])
        r ← r + 1
    vs
# Входные параметры:
# vr - массив родителей
# α - параметр (0 <= α <= 1)
#
# Выходной параметр:
# vs - массив особей потомков
vp := crossingover(vr, α)
fp := f(vp) = [
    1.46584; 1.46584; 1.46584; 1.46584; 1.46584; 1.46584; 1.46584; 1.46584; 1.46584; 1.46584
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]
mean(fp) = 2.08894
# Шаг 5. Мутация
vp = [
    0.677419; 0.677419; 0.677419; 0.677419; 0.677419; 0.677419; 0.677419; 0.677419; 0.677419; 0.677419
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]
mutation(vs, a, b, β) :=
    n ← rows(vs)
    ff ← f(vs)
    aa ← sort(ff)
    for j ∈ 1 .. n
        for i ∈ 1 .. n
            k1[i] ← j if ff[j] == aa[i]
    for j ∈ 1 .. n
        vm[j] ← vs[k1[j]]
    m ← n/2
    for i ∈ 1 .. m
        r ← rnd(1)
        g ← (vm[i + m] - a)/(b - a)
        g1 ← g
        g1 ← g - g*((g - r)/g)^β if g ≥ r
        g1 ← g + (1 - g)*((r - g)/(1 - g))^β otherwise
        vm[i + m] ← (1 - g1)*a + g1*b
    vm
# Входные параметры:
# vs - массив потомков
# a,b - границы интервалов
# β - параметр (0<=β<=1)
#
# Выходной параметр:
# vm - массив мутированных особей
vm := mutation(vp, a, b, β)
vm = [
    0.677419; 0.677419; 0.677419; 0.677419; 0.677419; 0.677419; 0.677419; 0.677419; 0.677419; 0.677419
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]
fm := f(vm) = [
    1.46584; 1.46584; 1.46584; 1.46584; 1.46584; 1.46584; 1.46584; 1.46584; 1.46584; 1.46584
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]
mean(fm) = 44345.2
# Шаг 6. Элитарный отбор
eliteChoice(vr, vm, a, b) :=
    n ← rows(vr)
    L ← cols(vr)
    ffr ← f(vr)
    ar ← sort(ffr)
    for j ∈ 1 .. n
        for i ∈ 1 .. n
            kr[i] ← j if ffr[j] == ar[i]
    ffm ← f(vm)
    am ← sort(ffm)
    for j ∈ 1 .. n
        for i ∈ 1 .. n
            km[i] ← j if ffm[j] == am[i]
    for j ∈ 1 .. n/2
        for i ∈ 1 .. L
            vn[j, i] ← vr[kr[j], i]
            vn[j + n/2, i] ← vr[km[j], i]
    vn
# Входные параметры:
# vr - массив родителей
# vm - массив потомков
# a, b - границы интервала
#
# Выходной параметр:
# vт - массив лучших отобранных особей
vn := eliteChoice(vr, vm, a, b)
vn = [
    0.677419; 0.677419; 0.677419; 0.677419; 0.677419; 0.677419; 0.677419; 0.677419; 0.677419; 0.677419
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]
fn := f(vn) = [
    1.46584; 1.46584; 1.46584; 1.46584; 1.46584; 1.46584; 1.46584; 1.46584; 1.46584; 1.46584
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]
mean(fn) = 1.46584
res(a, b, L, K, N, α, β, ε) :=
    k0 ← osobNumber(L, K)
    x0 ← zeroPopulation(a, b, k0, L)
    max ← mean(f(x0))
    i ← 0
    while i < N
        i ← i + 1
        w ← ws(x0, K)
        k ← ruletka(w)
        cr ← selection(k, x0)
        cp ← crossingover(cr, α)
        cm ← mutation(cp, a, b, β)
        cn ← eliteChoice(cr, cm, a, b)
        f_x ← f(cn)
        best ← mean(f_x)
        break if |max - best| ≤ ε
        max ← best
        x0 ← cn
    x0
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r := res(a, b, L, K, N, α, β, ε) = [
    2.03226; 2.03226; 2.03226; 2.03226; 2.03226; 2.03226; 2.03226; 2.03226; 2.03226; 2.03226
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]
f(r) = [
    2.28214; 2.28214; 2.28214; 2.28214; 2.28214; 2.28214; 2.28214; 2.28214; 2.28214; 2.28214
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]
y := 0
Minimize(f, y) = 0.650045
f(0.65) = 1.46522
kk := match(min(f(r)), f(r))[1] = 1
r[kk] = 2.03226
